# Worksheet setting: ORIGIN = 1
# Задание 1
p(x) := x^4 + 3*x^3 + 3*x^2 - 2
# [plot: p(x) vs x]
V := p(x) coeffs → [-2; 0; 3; 3; 1]
r := polyroots(V)
r = [-1.61803; -1 - 1i; -1 + 1i; 0.618034]
# Задание 2
f(x) := sqrt(x + 1) - (1/x)
# [plot: f(t) vs t]
x := 0.00001
x1 := root(f(x), x)
x1 = 0.754878
# Задание 3
M := [1.7, 2.8, 1.9; 2.1, 3.4, 1.8; 4.2, -3.3, 1.3]
B := [0.7; 1.1; 2.1]
sol := lsolve(M, B)
sol = [0.723671; 0.110553; -0.441995]
# Задание 4
solve block
    # guess values
    y := -10
    x := -10
    # constraints
    sin(x + y) - 1.6*x == 0
    x^2 + y^2 == 1
    # solver
    find(x, y) = [-0.616307; -0.787506]
end solve block
# Так как функции пересекаются в 2 местах, значит и решений будет 2:
[6.163*10^-1; 7.875*10^-1]
[-(6.163*10^-1); -(7.875*10^-1)]
f1(x, y) := sin(x + y) - 1.6*x
f2(x, y) := x^2 + y^2 - 1
F(x, y) := f1(x, y)^2 + f2(x, y)^2
# [3D plot: F]
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# Задание 5
R(x_1, x_2, x_3, x_4, x_5) := -2*x_1 + x_2 + 4*x_3 - x_4 - x_5
solve block
    # guess values
    x_1 := 0
    x_2 := 0
    x_3 := 0
    x_4 := 0
    x_5 := 0
    # constraints
    x_2 + 2*x_4 - x_5 == 1
    x_1 - x_4 - x_5 == 1
    2*x_2 + x_3 + 2*x_5 == 4
    x_1 ≥ 0
    x_2 ≥ 0
    x_3 ≥ 0
    x_4 ≥ 0
    x_5 ≥ 0
    # solver
    [x_1; x_2; x_3; x_4; x_5] := Minimize(R, x_1, x_2, x_3, x_4, x_5) = [4.5; 0; 0; 1.5; 2]
end solve block
R(x_1, x_2, x_3, x_4, x_5) = -12.5
